// COMSOL Multiphysics 5.6.0.280 model "DLD_COMSOL.mph"
// Outline of the model tree

Parameters
  Do = 20[um]
  visc = 1e-3[Pa*s]
  dens = 1e3[kg/m^3]
  G = 40[um]
  N = 10
  Re = 1
  U = Re*visc/(dens*G)
  epsilon = 1/N
  theta = atan(epsilon)
  E = 40[um]
  R = 12*visc*L/(G^3*E)
  L = Do+G
  P = R*U*G*E

Geometry
  geom1 "Geometry 1" (2D, length unit µm)
    c1: Circle | contributeto = csel1; r = Do/2
    arr1: Array | input = c1; size = 2; type = linear; linearsize = 2; fullsize = {2, 2}; displ = {Do+G, (Do+G)*(1/N)}
    arr2: Array | input = selection csel1; size = {1, 2}; fullsize = {1, 2}; displ = {0, Do+G}
    pol1: Polygon | source = table; table = {{0, 0}, {Do+G, (Do+G)*(1/N)}, {Do+G, (Do+G)*(1+1/N)}, {0, Do+G}}
    dif1: Difference | input = pol1; input2 = selection csel1
    pol2: Polygon | source = table; table = {{0, 0}, {Do+G, (Do+G)*(1/N)}, {Do+G, (Do+G)*(1+1/N)}, {0, Do+G}}
    fin: Finalize "Form Union"

Materials
  mat1: Common "Material 1" on all domains
    def "Basic"
      density = dens
      dynamicviscosity = visc

Physics
  spf: LaminarFlow on domains 2
    dependent variable u = {u, v, w}
    fp1: FluidProperties (default)
    init1: init "Initial Values 1" (default)
    wallbc1: WallBC "Wall 1" (default)
    pfc1: PeriodicFlowCondition on boundaries 3, 11 | pdiff = P; destinationDomains: boundaries 11
    pfc2: PeriodicFlowCondition on boundaries 6, 7 | destinationDomains: boundaries 7
    prpc1: PressurePointConstraint on points 12
  spf2: LaminarFlow on domains 1, 3-5
    dependent variable u2 = {u2, v2, w2}
    fp1: FluidProperties (default)
    init1: init "Initial Values 1" (default)
    wallbc1: WallBC "Wall 1" (default)
    prpc1: PressurePointConstraint on all points

Mesh
  mesh1 "Mesh 1"
    size: MeshSizeDefault | table = cfd; hauto = 2
    size1: Size on boundaries 1, 2, 4, 5, 8-10, 12-18 | table = cfd; hauto = 1
    cr1: CornerRefinement on domains 1-5 | boundary = boundaries 1, 2, 4, 5, 8-10, 12-18
    ftri1: FreeTri "Free Triangular 1" on remaining entities
    bl1: BndLayer "Boundary Layers 1" on domains 1-5 | sharpcorners = trim
      blp1: BndLayerProp "Boundary Layer Properties 1" on selection geom1_csel1_bnd | blnlayers = 2; blhminfact = 5

Studies
  std1 "Study 1"
    stat: Stationary

Solver configurations
  sol1 "Solution 1" (study std1)
    v1: Variables "Dependent Variables 1"
    s1: Stationary "Stationary Solver 1"
      fc1: FullyCoupled | linsolver = d1; initstep = 0.01; maxiter = 100
      d1: Direct "Direct, fluid flow variables (spf) (merged)" | linsolver = pardiso; pivotperturb = 1.0E-13

Datasets
  dset1: Solution | solution = sol1

Plots
  pg1: PlotGroup2D "Velocity (spf)" | data = dset1
    surf1: Surface | expr = spf.U
    str1: Streamline | expr = {u, v}; udist = 0.01; maxsteps = 50000
  pg2: PlotGroup2D "Pressure (spf)" | data = dset1
    con1: Contour | expr = p; levelrounding = off

Exports
  data1: Data
    data = dset1
    expr = {u, v}
    unit = {m/s, m/s}
    descr = {"Velocity field, x component", "Velocity field, y component"}
    filename = D:\Dropbox\DLDNN\Data.csv
    separator = ,